<?xml version="1.0"?>
<turbine_engine name="Tumansky R-15BD-300">
  <milthrust unit="N">  73551 </milthrust> <!-- source: Turbofan and turbojet engines: database handbook, p.386 -->
  <maxthrust unit="N"> 109871 </maxthrust> <!-- source: Turbofan and turbojet engines: database handbook, p.386 -->
  <tsfc>            1.25 </tsfc>        <!-- source: wikipedia :( -->
  <atsfc>           2.70 </atsfc>       <!-- source: wikipedia :( -->
  <bleed>           0.03 </bleed>
  <idlen1>         30.0  </idlen1>      <!-- using same value as R25-300 -->
  <idlen2>         45.0  </idlen2>      <!-- using same value as R25-300 -->
  <maxn1>         103.5  </maxn1>       <!-- using same value as R25-300 -->
  <maxn2>         107.5  </maxn2>       <!-- using same value as R25-300 -->
  <augmented>         1  </augmented>
  <augmethod>         1  </augmethod>
  <injected>          0 </injected> <!-- TODO -->

  <function name="IdleThrust">
   <table>
    <independentVar lookup="row">velocities/mach</independentVar>
    <independentVar lookup="column">atmosphere/density-altitude</independentVar>
    <tableData> <!-- figure 3.27 -->
              16400   36000   49200   65600
        0.0   0.041   0.027   0.014   0.010
        0.2   0.041   0.027   0.014   0.010
        0.4   0.041   0.027   0.013   0.010
        0.6   0.021   0.021   0.012   0.010
        0.8  -0.041   0.003   0.011   0.009
        1.0  -0.055  -0.014   0.009   0.008
        1.2  -0.055  -0.034   0.006   0.007
        1.4  -0.055  -0.055   0.003   0.005
        1.6  -0.055  -0.055  -0.001   0.004
        1.8  -0.055  -0.055  -0.007   0.001
        2.0  -0.055  -0.055  -0.014  -0.001
        2.2  -0.055  -0.055  -0.023  -0.005
        2.4  -0.055  -0.055  -0.036  -0.011
        2.6  -0.055  -0.055  -0.051  -0.019
        2.8  -0.055  -0.055  -0.055  -0.034
    </tableData>
   </table>
  </function>

  <function name="MilThrust">
   <table>
    <independentVar lookup="row">velocities/mach</independentVar>
    <independentVar lookup="column">atmosphere/density-altitude</independentVar>
    <tableData> <!-- figure 3.26 -->
              0       16400   36000   65600
        0.0   1.000   0.000   0.000   0.000
        0.2   0.890   0.000   0.000   0.000
        0.4   0.849   0.479   0.000   0.000
        0.6   0.863   0.507   0.205   0.000
        0.8   0.890   0.562   0.260   0.000
        1.0   0.918   0.685   0.329   0.082
        1.2   0.000   0.822   0.411   0.096
        1.4   0.000   0.959   0.534   0.123
        1.6   0.000   0.000   0.411   0.082
        1.8   0.000   0.000   0.534   0.123
        2.0   0.000   0.000   0.589   0.151
        2.2   0.000   0.000   0.000   0.151
        2.4   0.000   0.000   0.000   0.137
        2.6   0.000   0.000   0.000   0.110
        2.8   0.000   0.000   0.000   0.075
    </tableData>
   </table>
  </function>

  <function name="AugThrust">
   <table>
    <independentVar lookup="row">velocities/mach</independentVar>
    <independentVar lookup="column">atmosphere/density-altitude</independentVar>
    <tableData> <!-- figure 3.25 -->
              0       16400   36000   65600
        0.0   1.000   0.000   0.000   0.000
        0.2   0.954   0.000   0.000   0.000
        0.4   1.000   0.574   0.000   0.000
        0.6   1.111   0.639   0.278   0.000
        0.8   1.194   0.741   0.352   0.000
        1.0   1.278   0.926   0.463   0.130
        1.2   0.000   1.157   0.556   0.148
        1.4   0.000   1.370   0.741   0.176
        1.6   0.000   0.000   0.926   0.222
        1.8   0.000   0.000   1.250   0.278
        2.0   0.000   0.000   1.481   0.333
        2.2   0.000   0.000   1.556   0.389
        2.4   0.000   0.000   0.000   0.440
        2.6   0.000   0.000   0.000   0.481
        2.8   0.000   0.000   0.000   0.519
    </tableData>
   </table>
  </function>
</turbine_engine>
