<?xml version="1.0"?>
 <aerodynamics>
    <function name="aero/coefficients/Cla">
       <description>Lift due to alpha</description>
       <table>
          <independentVar lookup="row">aero/alpha-deg</independentVar>
          <independentVar lookup="column">velocities/mach</independentVar>
          <tableData> <!-- figure 2.6 -->
                     0.25   0.50   0.75   1.00   1.25   1.50   1.75   2.00   2.25   2.50
             -2.00  -0.18  -0.19  -0.20  -0.22  -0.19  -0.16  -0.15  -0.14  -0.13  -0.13
              0.00  -0.03  -0.03  -0.03  -0.03  -0.03  -0.03  -0.03  -0.03  -0.03  -0.03
              2.00   0.10   0.11   0.12   0.14   0.11   0.08   0.07   0.06   0.05   0.05
              4.00   0.23   0.24   0.26   0.29   0.24   0.19   0.16   0.15   0.14   0.14
              6.00   0.36   0.37   0.40   0.45   0.35   0.30   0.26   0.24   0.22   0.21
              8.00   0.49   0.50   0.55   0.61   0.48   0.41   0.36   0.33   0.31   0.30
             10.00   0.62   0.63   0.68   0.75   0.62   0.52   0.46   0.42   0.39   0.37
             12.00   0.75   0.76   0.81   0.87   0.71   0.61   0.56   0.52   0.48   0.46
             14.00   0.84   0.85   0.90   0.95   0.71   0.61   0.56   0.52   0.48   0.46
             16.00   0.93   0.94   1.00   0.95   0.71   0.61   0.56   0.52   0.48   0.46
             18.00   0.97   0.98   1.00   0.95   0.71   0.61   0.56   0.52   0.48   0.46
          </tableData>
       </table>
    </function>
    <function name="aero/coefficients/Clf">
       <description>Delta Lift due to flaps</description>
       <product>
           <property>fcs/flap-pos-deg</property>
           <value>0.008</value> <!-- figure 8.10, 0.2/25° -->
       </product>
    </function>
    <function name="aero/coefficients/Clg">
       <description>Delta Lift due to ground effect</description>
       <table>
          <independentVar lookup="row">position/h-agl-ft</independentVar>
          <tableData>
              0   0.080
              3   0.063
              5   0.053
              7   0.044
             10   0.031
             13   0.021
             16   0.013
             20   0.005
             23   0.002
             25   0.000
          </tableData>
       </table>
    </function>
    <function name="aero/coefficients/Cle">
       <description>Lift due to Elevator Deflection</description>
       <product>
           <property>fcs/elevator-pos-rad</property>
           <value>0.1</value>
       </product>
    </function>

    <function name="aero/coefficients/Cd0">
       <description>Drag at zero lift</description>
          <table>
            <independentVar lookup="row">velocities/mach</independentVar>
            <tableData> <!-- figure 2.7 -->
              0.2   0.0255
              0.8   0.0255
              0.9   0.0275
              1.0   0.0350
              1.1   0.0395
              1.2   0.0410
              1.3   0.0400
              2.4   0.0300
            </tableData>
          </table>
    </function>
    <function name="aero/coefficients/Cda">
       <description>Drag due to alpha and mach</description>
       <table>
          <independentVar lookup="row">aero/alpha-deg</independentVar>
          <tableData> <!-- figure 2.12, offset handled in Drag_mach -->
              0.0   0.001
              1.0   0.000
              2.0   0.001
              3.0   0.004
              4.0   0.008
              5.0   0.014
              6.0   0.021
              7.0   0.030
              8.0   0.040
          </tableData>
       </table>
    </function>
    <function name="aero/coefficients/Cdf">
       <description>Drag due to flaps</description>
         <product>
           <property>fcs/flap-pos-deg</property>
           <value> 0.0008 </value> <!-- figure 8.2 -->
         </product>
    </function>
    <function name="aero/coefficients/Cdg">
       <description>Drag due to gear</description>
         <product>
           <property>gear/gear-pos-norm</property>
           <value>0.016</value> <!-- figure 8.2, 0.0016 in figure 2.10 seems wrong -->
         </product>
    </function>
    <function name="aero/coefficients/Cdb">
       <description>Drag due to speedbrakes</description>
         <product>
           <property>fcs/speedbrake-pos-norm</property>
           <value>0.021</value> <!-- figure 2.10 -->
         </product>
    </function>
    <function name="aero/coefficients/Cds">
       <description>Drag due to sideslip</description>
       <product>
          <table>
            <independentVar lookup="row">aero/beta-rad</independentVar>
            <tableData>
              -1.57   1.23
              -0.26   0.05
               0.00   0.00
               0.26   0.05
               1.57   1.23
            </tableData>
          </table>
       </product>
    </function>
    <function name="aero/coefficients/Cde">
       <description>Drag due to Elevator Deflection</description>
       <product>
           <abs><property>fcs/elevator-pos-norm</property></abs>
           <value>0.04</value>
       </product>
    </function>

    <function name="aero/coefficients/Csb">
       <description>Side force due to beta</description>
       <product>
           <property>aero/beta-rad</property>
           <value>-1</value>
       </product>
    </function>

    <function name="aero/coefficients/Crb">
       <description>Roll moment due to beta</description>
       <product>
           <property>aero/beta-rad</property>
           <value>-0.1</value>
       </product>
    </function>
    <function name="aero/coefficients/Crd">
       <description>Roll moment due to roll rate</description>
       <product>
           <property>aero/bi2vel</property>
           <property>velocities/p-aero-rad_sec</property>
           <value>-0.4</value>
       </product>
    </function>
    <function name="aero/coefficients/Cry">
       <description>Roll moment due to yaw rate</description>
       <product>
           <property>aero/bi2vel</property>
           <property>velocities/r-aero-rad_sec</property>
           <value>0.15</value>
       </product>
    </function>
    <function name="aero/coefficients/Cra">
       <description>Roll moment due to aileron</description>
       <product>
          <property>fcs/left-aileron-pos-rad</property>
          <value>0.1</value>
       </product>
    </function>
    <function name="aero/coefficients/Crr">
       <description>Roll moment due to rudder</description>
       <product>
           <property>fcs/rudder-pos-rad</property>
           <value>0.01</value>
       </product>
    </function>

    <function name="aero/coefficients/Cpa">
       <description>Pitch moment due to alpha</description>
       <table>
          <independentVar lookup="row">aero/alpha-deg</independentVar>
          <tableData>
              -15  0.26
              -10  0.18
               -5  0.10
                0  0.01
                5 -0.08
               10 -0.16
               15 -0.24
          </tableData>
       </table>
    </function>
    <function name="aero/coefficients/Cpe">
       <description>Pitch moment due to elevator</description>
       <product>
          <property>fcs/elevator-pos-rad</property>
          <table>
            <independentVar lookup="row">velocities/mach</independentVar>
            <tableData>
              0.0     -0.800
              2.0     -0.300
            </tableData>
          </table>
       </product>
    </function>
    <function name="aero/coefficients/Cpd">
       <description>Pitch moment due to pitch rate</description>
       <product>
           <property>aero/ci2vel</property>
           <property>velocities/q-aero-rad_sec</property>
           <value>-18</value>
       </product>
    </function>
    <function name="aero/coefficients/Cpr">
       <description>Pitch moment due to alpha rate</description>
       <product>
           <property>aero/ci2vel</property>
           <property>aero/alphadot-rad_sec</property>
           <value>-9</value>
       </product>
    </function>

    <function name="aero/coefficients/Cyb">
       <description>Yaw moment due to beta</description>
       <product>
           <property>aero/beta-rad</property>
           <value>0.09</value>
       </product>
    </function>
    <function name="aero/coefficients/Cyd">
       <description>Yaw damp</description>
       <product>
           <property>aero/bi2vel</property>
           <property>velocities/r-aero-rad_sec</property>
           <value>-1.15</value>
       </product>
    </function>
    <function name="aero/coefficients/Cyr">
       <description>Yaw moment due to rudder</description>
       <product>
           <property>fcs/rudder-pos-rad</property>
           <value>-0.1</value>
       </product>
    </function>

    <function name="aero/coefficients/Cmr">
       <description>Roll stability due to mach</description>
       <product>
           <table>
             <independentVar lookup="row">velocities/mach</independentVar>
             <tableData> <!-- fig. 5.19, TODO: alpha dependency -->
               0.0   0.0005
               0.5   0.0005
               1.0   0.0009
               1.5   0.0014
               2.0   0.0013
               2.5   0.0010
             </tableData>
           </table>
           <value>2000</value> <!-- normalize to 1.0 -->
       </product>
    </function>
    <function name="aero/coefficients/Cmy">
       <description>Yaw stability due to mach</description>
       <product>
           <table>
             <independentVar lookup="row">velocities/mach</independentVar>
             <tableData> <!-- fig. 5.21, beta handled in Cyb, TODO: CG dependency -->
               0.0   0.0035
               0.5   0.0035
               1.0   0.0040
               1.5   0.0039
               2.0   0.0023
               2.5   0.0014
             </tableData>
           </table>
           <value>286</value> <!-- normalize to 1.0 -->
       </product>
    </function>

        <axis name="LIFT">
            <function name="aero/force/LIFT">
                <description>LIFT Force</description>
                <product>
                    <property>aero/qbar-psf</property>
                    <property>metrics/Sw-sqft</property>
                    <sum>
                        <property>aero/coefficients/Cla</property> <!-- OK -->
                        <property>aero/coefficients/Clf</property> <!-- OK -->
                        <property>aero/coefficients/Clg</property>
                        <property>aero/coefficients/Cle</property>
                    </sum>
                </product>
            </function>
        </axis>
        <axis name="DRAG">
            <function name="aero/force/DRAG">
                <description>DRAG Force</description>
                <product>
                    <property>aero/qbar-psf</property>
                    <property>metrics/Sw-sqft</property>
                    <sum>
                        <property>aero/coefficients/Cd0</property> <!-- OK -->
                        <property>aero/coefficients/Cda</property> <!-- OK -->
                        <property>aero/coefficients/Cdf</property> <!-- OK -->
                        <property>aero/coefficients/Cdg</property> <!-- OK -->
                        <property>aero/coefficients/Cdb</property> <!-- OK -->
                        <property>aero/coefficients/Cds</property>
                        <property>aero/coefficients/Cde</property>
                    </sum>
                </product>
            </function>
        </axis>
        <axis name="SIDE">
            <function name="aero/force/SIDE">
                <description>SIDE Force</description>
                <product>
                    <property>aero/qbar-psf</property>
                    <property>metrics/Sw-sqft</property>
                    <sum>
                        <property>aero/coefficients/Csb</property>
                    </sum>
                </product>
            </function>
        </axis>
        <axis name="ROLL">
            <function name="aero/force/ROLL">
                <description>ROLL Moment</description>
                <product>
                    <property>aero/qbar-psf</property>
                    <property>metrics/Sw-sqft</property>
                    <property>metrics/bw-ft</property>
                    <sum>
                        <!--<property>aero/coefficients/Crb</property>-->
                        <property>aero/coefficients/Crd</property>
                        <property>aero/coefficients/Cry</property>
                        <property>aero/coefficients/Cra</property>
                        <property>aero/coefficients/Crr</property>
                    </sum>
                    <property>aero/coefficients/Cmr</property> <!-- OK -->
                </product>
            </function>
        </axis>
        <axis name="PITCH">
            <function name="aero/force/PITCH">
                <description>PITCH Moment</description>
                <product>
                    <property>aero/qbar-psf</property>
                    <property>metrics/Sw-sqft</property>
                    <property>metrics/cbarw-ft</property>
                    <sum>
                        <property>aero/coefficients/Cpa</property>
                        <property>aero/coefficients/Cpe</property>
                        <property>aero/coefficients/Cpd</property>
                        <!--<property>aero/coefficients/Cpr</property>-->
                    </sum>
                </product>
            </function>
        </axis>
        <axis name="YAW">
            <function name="aero/force/YAW">
                <description>YAW Moment</description>
                <product>
                    <property>aero/qbar-psf</property>
                    <property>metrics/Sw-sqft</property>
                    <property>metrics/bw-ft</property>
                    <sum>
                        <property>aero/coefficients/Cyb</property>
                        <property>aero/coefficients/Cyd</property>
                        <property>aero/coefficients/Cyr</property>
                    </sum>
                    <property>aero/coefficients/Cmy</property> <!-- OK -->
                 </product>
            </function>
        </axis>
 </aerodynamics>
